*Heading
** Job name: mesh10 Model name: 8_cells_10_elements_tile
** Generated by: Abaqus/CAE 2019
*Preprint, echo=NO, model=NO, history=NO, contact=NO
**
** PARTS
**
*Part, name=Part-1
*Node
      1,       0.9375,           1.
      2,       0.9375,       0.9375
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*Element, type=DC2D4
  1,    1,  290, 5186,  325
  2,  290,  291, 5187, 5186
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*Nset, nset=phase1
     1,     2,     3,     5,     6,     7
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*Elset, elset=phase1
   101,   102,   103,   104,   105,   106
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*Nset, nset=phase2
     1,     2,     3,     4,     5,     6
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*Elset, elset=phase2
     1,     2,     3,     4,     5,     6
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*Nset, nset=boundary
    1,    3,    4,    5,    8,    9
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*Elset, elset=boundary
     1,    11,    21,    31,    41,    51
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*Nset, nset=_G6, internal
     1,     2,     3,     5,     6,     7
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*Elset, elset=_G6, internal
   101,   102,   103,   104,   105,   106
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*Nset, nset=_G7, internal
     1,     2,     3,     4,     5,     6
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*Elset, elset=_G7, internal
     1,     2,     3,     4,     5,     6
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** Section: Material-2
*Solid Section, elset=_G7, material=Material-2
,
** Section: Material-1
*Solid Section, elset=_G6, material=Material-1
,
*End Part
**
**
** ASSEMBLY
**
*Assembly, name=Assembly
**
*Instance, name=Part-1-1, part=Part-1
*End Instance
**
*End Assembly
**
** MATERIALS
**
*Material, name=Material-1
*Conductivity
1.,
*Material, name=Material-2
*Conductivity
this_kappa2
** ----------------------------------------------------------------
**
** STEP: Step-1
**
*Step, name=Step-1, nlgeom=NO
*Heat Transfer, steady state, deltmx=0.
1., 1., 1., 1.,
**
** BOUNDARY CONDITIONS
**
** Name: BC-1 Type: Temperature Using Analytical Field: AffineBC
*Boundary
Part-1-1.1, 11, 11, 0.9375
Part-1-1.3, 11, 11, 1.
Part-1-1.4, 11, 11, 1.
Part-1-1.5, 11, 11, 0.875
Part-1-1.8, 11, 11, 1.
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Part-1-1.5185, 11, 11, 0.18125
**
** OUTPUT REQUESTS
**
*Restart, write, frequency=0
**
** FIELD OUTPUT: F-Output-1
**
*Output, field, variable=PRESELECT
*Output, history, frequency=0
*End Step
